*HEADING
*NODE, NSET=ALLNODES, input=F9Node.txt
*ELEMENT, TYPE=C3D8H, ELSET=ALL, input=F9EL.txt
*Nset, nset=Load
34143
*Nset, nset=Inner1
1
*Nset, nset=Inner2
511
*Nset, nset=Inner3
481
*Elset, Elset=XZ
31711
*Elset, Elset=XY
31290
*Elset, Elset=YZ
31275
*Nset, nset=Surf-In-1
  481,   482,   483,   484,   485,   486
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*Nset, nset=Surf-In-2
    1,    17,    33,    49,    65,    81
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*Nset, nset=Surf-In-3
    1,     2,     3,     4,     5,     6
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*Nset, nset=Surf-Out-1
33888, 33889, 33890, 33891, 33892, 33893
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*Nset, nset=Surf-Out-2
33903, 33919, 33935, 33951, 33967, 33983
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*Nset, nset=Surf-Out-3
34128, 34129, 34130, 34131, 34132, 34133
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*Solid Section, elset=ALL, material=material1
*Material, name=Material1
*DEPVAR
 2,
*HYPERELASTIC,USER,TYPE=INCOMPRESSIBLE,PROPERTIES=1
 0.5
*boundary
Surf-In-1,1,1
Surf-In-2,2,2
Surf-In-3,3,3
*EQUATION
2
Surf-Out-1,1,1,Load,1,-1
2
Surf-Out-2,2,1,Load,2,-1
2
Surf-Out-3,3,1,Load,3,-1
*RESTART,WRITE, frequency=0
**step1
*STEP, Name=step1, NLGEOM=YES, inc=10000000000
*STATIC
0.00001,0.1,0.000001,0.01
*boundary
Load,1,1,8
Load,2,2,8
Load,3,3,8
*Output, field, variable=PRESELECT, frequency=1
*Element Output, Elset=XZ, Position=CENTROIDAL
S
*Element Output, Elset=XY, Position=CENTROIDAL
S
*Element Output, Elset=YZ, Position=CENTROIDAL
S
*Output, history, variable=PRESELECT, frequency=1
*Node Output, nset=Load
COOR1,COOR2,COOR3
*Node Output, nset=Inner1
COOR1,COOR2,COOR3
*Node Output, nset=Inner2
COOR1,COOR2,COOR3
*Node Output, nset=Inner3
COOR1,COOR2,COOR3
*END STEP
**step2
*STEP, Name=step2, NLGEOM=YES, inc=10000000000
*STATIC
0.00001,0.9,0.000001,0.001
*boundary
Load,1,1,80
Load,2,2,80
Load,3,3,80
*Output, field, variable=PRESELECT, frequency=1
*Element Output, Elset=XZ, Position=CENTROIDAL
S
*Element Output, Elset=XY, Position=CENTROIDAL
S
*Element Output, Elset=YZ, Position=CENTROIDAL
S
*Output, history, variable=PRESELECT, frequency=1
*Node Output, nset=Load
COOR1,COOR2,COOR3
*Node Output, nset=Inner1
COOR1,COOR2,COOR3
*Node Output, nset=Inner2
COOR1,COOR2,COOR3
*Node Output, nset=Inner3
COOR1,COOR2,COOR3
*END STEP
